*Heading
** Job name: SingleCrack Model name: Model-1
** Generated by: Abaqus/CAE 6.13-1
*Preprint, echo=NO, model=NO, history=NO, contact=NO
**
** PARTS
**
*Part, name=Sample
*Node
      1,          0.5, -0.100000001
      2, -0.099917002, -0.100000001
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*********************** TRIANGULAR ****************************
*User element, nodes=3, type=U1, properties=3, coordinates=2, VARIABLES=6
3
***************************************************************
*User element, nodes=3, type=U3, properties=4, coordinates=2, VARIABLES=42
1,2
***************************************************************
*********************** RECTENGULAR ***************************
*User element, nodes=4, type=U2, properties=3, coordinates=2, VARIABLES=8
3
***************************************************************
*User element, nodes=4, type=U4, properties=4, coordinates=2, VARIABLES=56
1,2
***************************************************************
***************************************************************
*Element, type=U1
1, 979, 605, 556
2, 754, 710, 693
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***************************************************************
*Element, type=U3
4435, 979, 605, 556
4436, 754, 710, 693
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***************************************************************
*Element, type=U2
18, 16, 450, 453, 15
19, 403, 402, 473, 476
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***************************************************************
*Element, type=U4
4452, 16, 450, 453, 15
4453, 403, 402, 473, 476
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***************************************************************
********************** ASSIGNING MATERIAL PROP ****************
*Elset, elset=SampleSET, generate
    1,  4434,     1
***************************************************************
*Uel property, elset=SampleSET
0.01, 0.0027, 1
**lc, gc, h
***************************************************************
*Elset, elset=SampleSET_SS, generate
4435, 8868, 1
***************************************************************
*Uel property, elset=SampleSET_SS
210, 0.3, 1, 1e-07
***************************************************************
*Element, type=CPE3
8869, 979, 605, 556
8870, 754, 710, 693
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***************************************************************
*Element, type=CPE4
8886, 16, 450, 453, 15
8887, 403, 402, 473, 476
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***************************************************************
*Elset, elset=umatelem, generate
8869, 13302, 1
***************************************************************
*Solid Section, elset=umatelem, material=UMATELEM
1.0
*End Part
**
**
** ASSEMBLY
**
*Assembly, name=Assembly
**
*Instance, name=Sample-1, part=Sample
*End Instance
**
*Node
      1,           0.,  0.600000024,           0.
*Nset, nset=BTM, instance=Sample-1
   5,   6, 101, 102, 103, 104
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*Elset, elset=BTM, instance=Sample-1
  88,  96, 555, 560, 576, 630
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*Nset, nset=BTM_L, instance=Sample-1
 5,
*Nset, nset=RP
 1,
*Nset, nset=TOP, instance=Sample-1
  12,  13, 359, 360, 361, 362
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*Elset, elset=TOP, instance=Sample-1
 3780, 3786, 4327, 4346, 4353, 4356
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** Constraint: Constraint-1
*Equation
2
TOP, 2, 1.
RP, 2, -1.
**
*Elset, elset=umatelem, instance=Sample-1, generate
8869, 13302, 1
**
*End Assembly
***************************************************************
*Amplitude, name=Amp-1, time=TOTAL TIME
             0.,              0.,              1.,            0.01
**
** MATERIALS
**
*Material, name=UMATELEM
*Depvar
     16,
*User Material, constants=2
 1e-11, 0.3
** ----------------------------------------------------------------
**
** STEP: Step-1
**
*Step, name=Step-1, nlgeom=NO, inc=50
*Static, direct
0.01, 0.5,
**
** BOUNDARY CONDITIONS
**
** Name: BTM_FIX Type: Displacement/Rotation
*Boundary
BTM, 2, 2
** Name: BTM_X Type: Displacement/Rotation
*Boundary
BTM_L, 1, 1
** Name: LOAD Type: Displacement/Rotation
*Boundary, amplitude=Amp-1
RP, 2, 2, 1.
**
** OUTPUT REQUESTS
**
*Restart, write, frequency=0
**
** FIELD OUTPUT: F-Output-1
**
*Output, field
*Node Output
RF, U
**
** HISTORY OUTPUT: H-Output-1
**
*element output, elset=umatelem
SDV
**
*End Step
** ----------------------------------------------------------------
**
** STEP: Step-2
**
*Step, name=Step-2, nlgeom=NO, inc=400
*Static, direct
0.001, 0.4,
**
** OUTPUT REQUESTS
**
*Restart, write, frequency=0
**
** FIELD OUTPUT: F-Output-1
**
*Output, field
*Node Output
RF, U
**
** HISTORY OUTPUT: H-Output-1
**
*element output, elset=umatelem
SDV
**
*End Step
